// SBML level 3 version 2

model bioscrape_generated_model_374639()
  // model units - substance: mole, time: second, volume: litre, area: square_metre, length: metre, extent: mole

  // Compartments:
  compartment default = 1e-6;

  // Species:
  species G in default = 0;
  species I in default = 0;
  species T in default = 0;
  species X in default = 0;

  // Parameters:
  DummyVar_GammaDelay_k_3 = 10;
  DummyVar_GammaDelay_theta_4 = 3;
  DummyVar_GaussianDelay_mean_0 = 10;
  DummyVar_GaussianDelay_std_1 = 1;
  DummyVar_PositiveHillPropensity_n_2 = 1;
  KI = 10;
  KR = 20;
  delta = 0.1;
  ktl = 10;
  ktx = 1.5;
  n = 2;

  // Reactions:
  r0: G => G; G*I^n*ktx/(I^n + KI);  // modifiers: I
  r1: T => T; T^n*ktl/(KR + T^DummyVar_PositiveHillPropensity_n_2);

  // Unit definitions:
  unit square_metre = metre^2;
end
