// SBML level 3 version 2

model bioscrape_generated_model_729963()
  // model units - substance: mole, time: second, volume: litre, area: square_metre, length: metre, extent: mole

  // Compartments:
  compartment default = 1e-6;

  // Species:
  species A in default = 1;
  species B in default = 0;
  species Programmed in default = 2;
  species Reporter in default = 0;
  species Total in default = 0;

  // Parameters:
  T_signal = 25;
  X0 = 2;
  X1 = 10;
  gamma = 0.05;
  k_convert = 0.08;
  signal = 0.05;
  signal_high = 1.2;
  signal_low = 0.05;

  // Reactions:
  r0: A => B; k_convert*A;
  r1: => Reporter; signal;
  r2: Reporter => ; gamma*Reporter;

  // Unit definitions:
  unit square_metre = metre^2;
end
