// SBML level 3 version 1

model main()
  // model units - substance: mole, time: second, volume: litre, area: square_metre, length: metre, extent: mole

  // Compartments:
  compartment default = 1e-6;

  // Species:
  species E in default = 15;
  species B in default = 36;
  species D in default = 22;
  species G in default = 92;
  species C in default = 74;
  species F in default = 30;
  species A in default = 71;

  // Parameters:
  DummyVar_NegativeProportionalHillPropensity_k_0 = 0.704;
  DummyVar_NegativeProportionalHillPropensity_K_1 = 5.658;
  DummyVar_NegativeProportionalHillPropensity_n_2 = 0.207;
  DummyVar_PositiveProportionalHillPropensity_k_3 = 0.8;
  DummyVar_PositiveProportionalHillPropensity_K_4 = 1.047;
  DummyVar_PositiveProportionalHillPropensity_n_5 = 0.75;

  // Reactions:
  r0: B + D + E => C + D + G; DummyVar_NegativeProportionalHillPropensity_k_0*B/(E^DummyVar_NegativeProportionalHillPropensity_n_2 + DummyVar_NegativeProportionalHillPropensity_K_1);
  r1: 2 E + C => A + F; DummyVar_PositiveProportionalHillPropensity_k_3*C*E^n/(E^DummyVar_PositiveProportionalHillPropensity_n_5 + DummyVar_PositiveProportionalHillPropensity_K_4);

  // Unit definitions:
  unit square_metre = metre^2;
end
