// SBML level 3 version 1

model bioscrape_generated_model_907457()
  // model units - substance: mole, time: second, volume: litre, area: square_metre, length: metre, extent: mole

  // Compartments:
  compartment default = 1e-6;

  // Species:
  species PX in default = 0;
  species PY in default = 0;
  species PZ in default = 0;
  species X in default = 0;
  species Y in default = 20;
  species Z in default = 0;

  // Parameters:
  eff = 20;
  n = 2;
  KM = 40;
  tau_mRNA = 2;
  tau_prot = 10;
  ps_a = 0.5;
  ps_0 = 0.0005;

  // Assignment rules:
  t_ave := tau_mRNA/ln(2);
  beta := tau_mRNA/tau_prot;
  k_tl := eff/t_ave;
  a_tr := -60*ps_0 + 60*ps_a;
  a0_tr := 60*ps_0;
  kd_prot := ln(2)/tau_prot;
  kd_mRNA := ln(2)/tau_mRNA;
  alpha := a_tr*eff*tau_prot/(KM*ln(2));
  alpha0 := a0_tr*eff*tau_prot/(KM*ln(2));

  // Reactions:
  r0: X => ; X*kd_mRNA;
  r1: Y => ; Y*kd_mRNA;
  r2: Z => ; Z*kd_mRNA;
  r3: => PX; X*k_tl;  // modifiers: X
  r4: => PY; Y*k_tl;  // modifiers: Y
  r5: => PZ; Z*k_tl;  // modifiers: Z
  r6: PX => ; PX*kd_prot;
  r7: PY => ; PY*kd_prot;
  r8: PZ => ; PZ*kd_prot;
  r9: => X; KM^n*a_tr/(KM^n + PZ^n) + a0_tr;  // modifiers: PZ
  r10: => Y; KM^n*a_tr/(KM^n + PX^n) + a0_tr;  // modifiers: PX
  r11: => Z; KM^n*a_tr/(KM^n + PY^n) + a0_tr;  // modifiers: PY

  // Unit definitions:
  unit square_metre = metre^2;
end
