// SBML level 3 version 2

model bioscrape_generated_model_83482()
  // model units - substance: mole, time: second, volume: litre, area: square_metre, length: metre, extent: mole

  // Compartments:
  compartment default = 1e-6;

  // Species:
  species G in default = 1;
  species I in default;
  species S in default;
  species T in default = 0;
  species X in default = 0;

  // Parameters:
  DummyVar_PositiveHillPropensity_n_0 = 1;
  I0 = 10;
  KI = 10;
  KR = 20;
  T_I0 = 25;
  delta = 0.1;
  ktl = 10;
  ktx = 1.5;
  n = 2;

  // Assignment rules:
  I := I0*Heaviside(-T_I0 + t);
  S := 50*X/(0.2*X + 1);

  // Reactions:
  r0: G => G + T; G*I^n*ktx/(I^n + KI);  // modifiers: I
  r1: T => T + X; T^n*ktl/(KR + T^DummyVar_PositiveHillPropensity_n_0);
  r2: T => ; T*delta;
  r3: X => ; X*delta;

  // Unit definitions:
  unit square_metre = metre^2;
end
