// SBML level 3 version 2

model biocrnpyler_682153()
  // model units - substance: mole, time: second, volume: litre, area: square_metre, length: metre, extent: mole

  // Compartments:
  compartment default = 1e-6;

  // Species:
  species dna_G in default = 5.55;
  species protein_A in default = 0;
  species protein_X in default = 0;

  // Parameters:
  kex__ = 3.33;
  K__ = 5.045455;
  kd__ = 0.044;

  // Reactions:
  r0: dna_G => dna_G + protein_X; kex__*dna_G*(protein_A/K__)^n/(1 + (protein_A/K__)^n);  // modifiers: protein_A
    n = 2;
  r1: protein_X => ; kd__*protein_X;

  // Unit definitions:
  unit square_metre = metre^2;
end
