// SBML level 3 version 2

model bioscrape_generated_model_374639()
  // model units - substance: mole, time: second, volume: litre, area: square_metre, length: metre, extent: mole

  // Compartments:
  compartment default = 1e-6;

  // Species:
  species X in default = 0;
  species Y in default = 0;
  species Z in default = 0;

  // Parameters:
  k_forward = 1.1;
  k_forward_r1 = 2.1;
  k_forward_r2 = 3.1;
  k_reverse = 1.2;
  k_reverse_r1rev = 2.2;
  k_reverse_r2rev = 3.2;

  // Reactions:
  r0: Y => ; k_forward*Y;
  r1: => Y; k_reverse;
  r2: X => ; k_forward_r1*X;
  r3: => X; k_reverse_r1rev;
  r4: Z => ; k_forward_r2*Z;
  r5: => Z; k_reverse_r2rev;

  // Unit definitions:
  unit square_metre = metre^2;
end
