// SBML level 3 version 2

model bioscrape_generated_model_442905()
  // model units - substance: mole, time: second, volume: litre, area: square_metre, length: metre, extent: mole

  // Compartments:
  compartment default = 1e-6;

  // Species:
  species A in default = 25;
  species B in default = 25;
  species C in default = 0;

  // Parameters:
  DummyVar_PositiveHillPropensity_K_1 = 0.133;
  DummyVar_PositiveHillPropensity_k_0 = 0.038;
  DummyVar_PositiveHillPropensity_n_2 = 2.053;

  // Reactions:
  r0: A + B => C; A^n*DummyVar_PositiveHillPropensity_k_0/(A^DummyVar_PositiveHillPropensity_n_2 + DummyVar_PositiveHillPropensity_K_1);

  // Unit definitions:
  unit square_metre = metre^2;
end
