// SBML level 3 version 2

model bioscrape_generated_model_442905()
  // model units - substance: mole, time: second, volume: litre, area: square_metre, length: metre, extent: mole

  // Compartments:
  compartment default = 1e-6;

  // Species:
  species A in default = 25;
  species B in default = 25;
  species C in default = 0;

  // Parameters:
  DummyVar_PositiveProportionalHillPropensity_K_1 = 0.133;
  DummyVar_PositiveProportionalHillPropensity_k_0 = 0.038;
  DummyVar_PositiveProportionalHillPropensity_n_2 = 2.053;

  // Reactions:
  r0: A + B => C; DummyVar_PositiveProportionalHillPropensity_k_0*B*A^n/(A^DummyVar_PositiveProportionalHillPropensity_n_2 + DummyVar_PositiveProportionalHillPropensity_K_1);

  // Unit definitions:
  unit square_metre = metre^2;
end
